#Particle packing by insertion and successive growing of particles

atom_style	granular
atom_modify	map array
boundary	m m m
newton		off
#echo		both

communicate	single vel yes

units		si

region		reg block -0.05 0.05 -0.05 0.05 0. 0.15 units box
create_box	5 reg

neighbor	0.002 bin
neigh_modify	delay 0


#Material properties required for new pair styles

fix 		m1 all property/global youngsModulus peratomtype 0.45e9 0.45e9 0.45e9 0.45e9 0.45e9
fix 		m2 all property/global poissonsRatio peratomtype 0.30 0.30 0.30 0.30 0.30
fix 		m3 all property/global coefficientRestitution peratomtypepair 5 0.25 0.25 0.25 0.25 0.25 0.25 0.25 0.25 0.25 0.25 0.25 0.25 0.25 0.25 0.25 0.25 0.25 0.25 0.25 0.25 0.25 0.25 0.25 0.25 0.25
fix 		m4 all property/global coefficientFriction peratomtypepair 5 0.1 0.1 0.1 0.1 0.1 0.1 0.1 0.1 0.1 0.1 0.1 0.1 0.1 0.1 0.1 0.1 0.1 0.1 0.1 0.1 0.1 0.1 0.1 0.1 0.1

# 결합 강성·반지름
fix m05 all property/global Bondmultiplier peratomtypepair 5 0.24 0.24 0.24 0.24 0.24 0.24 0.24 0.24 0.24 0.24 0.24 0.24 0.24 0.24 0.24 0.24 0.24 0.24 0.24 0.24 0.24 0.24 0.24 0.24 0.24  #<f_b> #<rb_mult>
fix m06 all property/global normalBondStiffnessPerUnitArea    peratomtypepair 5 13.5e10 13.5e10 13.5e10 13.5e10 13.5e10 13.5e10 13.5e10 13.5e10 13.5e10 13.5e10 13.5e10 13.5e10 13.5e10 13.5e10 13.5e10 13.5e10 13.5e10 13.5e10 13.5e10 13.5e10 13.5e10 13.5e10 13.5e10 13.5e10 13.5e10 #<Sn>
fix m07 all property/global tangentialBondStiffnessPerUnitArea peratomtypepair 5 13.5e10 13.5e10 13.5e10 13.5e10 13.5e10 13.5e10 13.5e10 13.5e10 13.5e10 13.5e10 13.5e10 13.5e10 13.5e10 13.5e10 13.5e10 13.5e10 13.5e10 13.5e10 13.5e10 13.5e10 13.5e10 13.5e10 13.5e10 13.5e10 13.5e10 #<Sn>#<St>

# 파괴 기준(하나 선택)
#fix m08 all property/global maxDistanceBond peratomtypepair 1 <r_break>      # stressBreak off
# 또는
fix m08a all property/global maxSigmaBond peratomtypepair 5 28e6 28e6 28e6 28e6 28e6 28e6 28e6 28e6 28e6 28e6 28e6 28e6 28e6 28e6 28e6 28e6 28e6 28e6 28e6 28e6 28e6 28e6 28e6 28e6 28e6     #<σ_max>          # stressBreak on #<σ_max>          # stressBreak on
fix m08b all property/global maxTauBond   peratomtypepair 5 0.8e6 0.8e6 0.8e6 0.8e6 0.8e6 0.8e6 0.8e6 0.8e6 0.8e6 0.8e6 0.8e6 0.8e6 0.8e6 0.8e6 0.8e6 0.8e6 0.8e6 0.8e6 0.8e6 0.8e6 0.8e6 0.8e6 0.8e6 0.8e6 0.8e6    #<τ_max>#<τ_max>

# 결합 생성 시점/거리
fix m13 all property/global tsCreateBond      scalar 35001
#fix m14 all property/global createDistanceBond peratomtypepair 1 0.032  #<r_create>

# 선택 옵션: 댐핑 또는 시간소산
fix m09 all property/global dampingNormalForceBond       peratomtypepair 5 0.95 0.95 0.95 0.95 0.95 0.95 0.95 0.95 0.95 0.95 0.95 0.95 0.95 0.95 0.95 0.95 0.95 0.95 0.95 0.95 0.95 0.95 0.95 0.95 0.95  #<α_fn>
fix m10 all property/global dampingTangentialForceBond   peratomtypepair 5 0.95 0.95 0.95 0.95 0.95 0.95 0.95 0.95 0.95 0.95 0.95 0.95 0.95 0.95 0.95 0.95 0.95 0.95 0.95 0.95 0.95 0.95 0.95 0.95 0.95  #<α_ft>
fix m11 all property/global dampingNormalTorqueBond      peratomtypepair 5 0.95 0.95 0.95 0.95 0.95 0.95 0.95 0.95 0.95 0.95 0.95 0.95 0.95 0.95 0.95 0.95 0.95 0.95 0.95 0.95 0.95 0.95 0.95 0.95 0.95  #<α_tn>
fix m12 all property/global dampingTangentialTorqueBond  peratomtypepair 5 0.95 0.95 0.95 0.95 0.95 0.95 0.95 0.95 0.95 0.95 0.95 0.95 0.95 0.95 0.95 0.95 0.95 0.95 0.95 0.95 0.95 0.95 0.95 0.95 0.95  #<α_tt>
# (또는 dissipation*Bond 계열)


#New pair style
pair_style gran model hertz tangential history cohesion bond2 stressBreak on #Hertzian without cohesion
pair_coeff	* *

timestep	0.00001

fix xwalls1 all wall/gran model hertz tangential history primitive type 1 xplane -0.05
fix xwalls2 all wall/gran model hertz tangential history primitive type 1 xplane +0.05
fix ywalls1 all wall/gran model hertz tangential history primitive type 1 yplane -0.05
fix ywalls2 all wall/gran model hertz tangential history primitive type 1 yplane +0.05
fix zwalls1 all wall/gran model hertz tangential history primitive type 1 zplane  0.00
fix zwalls2 all wall/gran model hertz tangential history primitive type 1 zplane  0.15


#distributions for insertion
fix		pts1 all particletemplate/sphere 15485863 atom_type 1 density constant 2500 radius constant 0.005
fix		pts2 all particletemplate/sphere 15485867 atom_type 2 density constant 2500 radius constant 0.008
fix		pts3 all particletemplate/sphere 32452843 atom_type 3 density constant 2500 radius constant 0.009
fix		pts4 all particletemplate/sphere 32452867 atom_type 4 density constant 2500 radius constant 0.010
fix		pts5 all particletemplate/sphere 49979687 atom_type 5 density constant 2500 radius constant 0.006
fix		pdd1 all particledistribution/discrete 49979693 5 pts1 0.3 pts2 0.2 pts3 0.1 pts4 0.2 pts5 0.2

#parameters for gradually growing particle diameter
variable	alphastart equal 0.25
variable	alphatarget equal 0.67
variable	growts equal 5000
variable	growevery equal 40
variable	relaxts equal 400000

#region  and insertion
group		nve_group region reg

#particle insertion
fix		ins nve_group insert/pack seed 67867967 distributiontemplate pdd1 &
			maxattempt 200 insert_every once overlapcheck yes all_in yes vel constant 0. 0. 0. &
			region reg volumefraction_region ${alphastart}

#apply nve integration to all particles that are inserted as single particles
fix		integr nve_group nve/sphere


#output settings, include total thermal energy
#compute		1 all erotate/sphere
#compute bc all bond/counter
compute cp all pair/gran/local delta
compute sumov all reduce sum c_cp[1]
#thermo_style	custom step atoms ke c_1 vol c_bc[1]
#thermo		1000
#thermo_modify	lost ignore norm no

#insert the first particles
run		1
dump		dmp all custom/vtk 350 post/packing_*.vtk id type type x y z ix iy iz vx vy vz fx fy fz omegax omegay omegaz radius
unfix		ins

group ptctype1 type 1
group ptctype2 type 2
group ptctype3 type 3
group ptctype4 type 4
group ptctype5 type 5

compute dia1 ptctype1 property/atom diameter   # 현재 지름 값 원자형 데이터로 수집
compute dia2 ptctype2 property/atom diameter
compute dia3 ptctype3 property/atom diameter
compute dia4 ptctype4 property/atom diameter
compute dia5 ptctype5 property/atom diameter

compute dia1_avg ptctype1 reduce ave c_dia1   # 현재 지름 값 스칼라로수집(thermo표시용 )
compute dia2_avg ptctype2 reduce ave c_dia2
compute dia3_avg ptctype3 reduce ave c_dia3
compute dia4_avg ptctype4 reduce ave c_dia4
compute dia5_avg ptctype5 reduce ave c_dia5

#output settings, include total thermal energy
compute		1 all erotate/sphere
compute bc all bond/counter
thermo_style custom step atoms ke vol c_dia1_avg c_dia2_avg c_dia3_avg c_dia4_avg c_dia5_avg c_bc[3] c_bc[2] c_bc[1] c_sumov#c_dia4_avg c_dia5_avg
thermo		1000
thermo_modify	lost ignore norm no


#calculate grow rate
variable	Rgrowrate equal (${alphatarget}/${alphastart})^(${growevery}/(3.*${growts}))
print		"The radius grow rate is ${Rgrowrate}"

#do the diameter grow
compute 	rad all property/atom radius

variable	dgrown atom ${Rgrowrate}*2.*c_rad
fix		grow all adapt ${growevery} atom diameter v_dgrown

#run
run		${growts}

#let the packing relax
unfix	grow
run		30000
thermo_style custom step atoms ke vol c_dia1_avg c_dia2_avg c_dia3_avg c_dia4_avg c_dia5_avg c_bc[3] c_bc[2] c_bc[1] c_sumov #c_dia4_avg c_dia5_avg
thermo		1
thermo_modify	lost ignore norm no

run		100

unfix zwalls2
run 800
